MACH MDAO AVL
#======================================================
#------------------- Geometry File --------------------
#======================================================
# AVL Conventions
# SI Used: m, kg, etc

#Mach
0.0
#IYsym   IZsym   Zsym
 0       0       0
#Sref    Cref    b_wing
1.123    0.25    6.01
#Xref    Yref    Zref
0,0 0.0 0.0
# CDp
0.00

#======================================================
#--------------------- Main Wing ----------------------
#======================================================
SURFACE
Wing
#Nchordwise  Cspace   [Nspan   Sspace]
     1        1.0      1      -2.0
SCALE
1.0  1.0  1.0
TRANSLATE
0.0  0.0  0.0
ANGLE
0.0
#------------------------------------------------------

SECTION
#Xle  Yle  Zle  |  Chord   Ainc   Nspan   Sspace
0.00    0.0    1.0     1.0     0.0
CONTROL
#surface gain xhinge hvec SgnDup
Elevator -1.00 0.5 0 1 0 1.00

SECTION
#Xle  Yle  Zle  |  Chord   Ainc   Nspan   Sspace
0.00    1.0    1.0     1.0     0.0
CONTROL
#surface gain xhinge hvec SgnDup
Elevator -1.00 0.5 0 1 0 1.00

# -- END OF FILE --
# #=============================================
BODY
Fuse pod
4   2.0
#
TRANSLATE
# 0.0  0.0  -1.75
0.0  0.0  0.0
#
BFIL
../geom_files/fuseSimple.dat
