# generated using OptVL
#===============================================================================
#------------------------------------ Header -----------------------------------
#===============================================================================
Wing Body 4
#Mach
0.0
#IYsym   IZsym   Zsym
0 0 0.0
#Sref    Cref    Bref
10.0 1.0 10.0
#Xref    Yref    Zref
0.25 0.0 0.0
#CD0
0.0
#===============================================================================
#------------------------------------- Wing ------------------------------------
#===============================================================================
SURFACE
Wing
#Nchordwise  Cspace  [Nspanwise  Sspace]
1 0.0 2 0.0
YDUPLICATE
0.0
SCALE
1.0 1.0 1.0
TRANSLATE
0.0 0.0 0.0
ANGLE
0.0
#---------------------------------------
SECTION
#Xle      Yle      Zle      | Chord    Ainc     Nspan  Sspace
 0.000000 -5.000000 0.000000   1.000000 0.000000 5      3.0
#AFILE | X1 X2
 AFILE 0.0  1.0
 airfoils/ag40d.dat
 CONTROL
#surface   gain xhinge       hvec       SgnDup
 flap  1.0 0.8 0.000000 0.000000 0.000000 1.0
 DESIGN
#surface   gain
 des  1.0
SECTION
#Xle      Yle      Zle      | Chord    Ainc     Nspan  Sspace
 0.000000 0.000000 0.000000   1.000000 0.000000 5      3.0
#AFILE | X1 X2
 AFILE 0.0  1.0
 airfoils/ag40d.dat
#===============================================================================
#----------------------------------- Fuselage ----------------------------------
#===============================================================================
BODY
Fuselage
#N  Bspace
10 0.0
SCALE
1.0 1.0 1.0
TRANSLATE
0.0 0.0 0.0
BFILE
fuseSupra.dat
